// COMSOL Multiphysics 6.1.0.282 model "TP2_p1_element_infini.mph"
// Outline of the model tree

Parameters
  rcoil = 50[mm]
  rcond = 1[mm]
  rair = 58[mm]
  courant = 1[A]
  Tamb = 25[degC]
  rinf = 5[mm]

Selections
  sel1: Explicit "Coil" on domains 4
  sel2: Explicit "Air" on domains 2

Coordinate systems
  ie1: InfiniteElement "Domaine de type élément infini 1" on domains 1, 3

Geometry
  geom1 "Géométrie 1" (2D axisymmetric, length unit mm)
    c1: Circle "Conducteur" | pos = {rcoil, 0}; r = rcond
    c2: Circle "Air" | rot = -90; layername = Couche 1; layer = rinf; r = rair; angle = 180
    pt1: Point
    pt2: Point | p = {, 50[mm]}
    fin: Finalize "Constituer une union"

Materials
  mat1: Common "Air" on domains 1-3
    def "Basic"
      thermalexpansioncoefficient = alpha_p(pA,T)
      molarmass = 0.02897[kg/mol]
      bulkviscosity = muB(T)
      relpermeability = 1
      relpermittivity = 1
      dynamicviscosity = eta(T)
      ratioofspecificheat = 1.4
      electricconductivity = 0[S/m]
      heatcapacity = Cp(T)
      density = rho(pA,T)
      thermalconductivity = k(T)
      soundspeed = cs(T)
      eta: Piecewise | arg = T; pieces = {200.0, 1600.0, -8.38278E-7+8.35717342E-8*T^1-7.69429583E-11*T^2+4.6437266E-14*T^3-1.06585607E-17*T^4}; argunit = K; fununit = Pa*s
      Cp: Piecewise | arg = T; pieces = {200.0, 1600.0, 1047.63657-0.372589265*T^1+9.45304214E-4*T^2-6.02409443E-7*T^3+1.2858961E-10*T^4}; argunit = K; fununit = J/(kg*K)
      rho: Analytic | expr = pA*0.02897/R_const[K*mol/J]/T; args = {pA, T}; fununit = kg/m^3; argunit = {Pa, K}
      k: Piecewise | arg = T; pieces = {200.0, 1600.0, -0.00227583562+1.15480022E-4*T^1-7.90252856E-8*T^2+4.11702505E-11*T^3-7.43864331E-15*T^4}; argunit = K; fununit = W/(m*K)
      cs: Analytic | expr = sqrt(1.4*R_const[K*mol/J]/0.02897*T); args = T; fununit = m/s; argunit = K
      an1: Analytic | funcname = alpha_p; expr = -1/rho(pA,T)*d(rho(pA,T),T); args = {pA, T}; fununit = 1/K; argunit = {Pa, K}
      an2: Analytic "Analytic 2a" | funcname = muB; expr = 0.6*eta(T); args = T; fununit = Pa*s; argunit = K
    RefractiveIndex
      n = 1
      ki = 0
    NonlinearModel
      BA = (def.gamma+1)/2
    idealGas
      Rs = R_const/Mn
      heatcapacity = Cp(T)
      ratioofspecificheat = 1.4
      molarmass = 0.02897
      Cp: Piecewise | arg = T; pieces = {200.0, 1600.0, 1047.63657-0.372589265*T^1+9.45304214E-4*T^2-6.02409443E-7*T^3+1.2858961E-10*T^4}; argunit = K; fununit = J/(kg*K)
  mat2: Common "Copper" on domains 4
    def "Basic"
      relpermeability = 1
      electricconductivity = 59.6e6[S/m]
      thermalexpansioncoefficient = 17e-6[1/K]
      heatcapacity = 385[J/(kg*K)]
      relpermittivity = 1
      density = 8960[kg/m^3]
      thermalconductivity = 400[W/(m*K)]
    Enu "Young's modulus and Poisson's ratio"
      E = 110[GPa]
      nu = 0.35
    linzRes "Linearized resistivity"
      rho0 = 1.72e-8[ohm*m]
      alpha = 0.0039[1/K]
      Tref = 298[K]

Physics
  mf: InductionCurrents "Champs magnétiques" on all domains
    dependent variable A = {Ar, Aphi, Az}
    PortSweepSettings.useSweep = 0
    al1: AmperesLaw "Loi d'Ampère 1" (default)
    axi1: AxialSymmetry "Symétrie axiale 1" (default)
    mi1: MagneticInsulation "Isolation magnétique 1" (default)
    init1: init "Valeurs initiales 1" (default)
    coil1: Coil "Bobine 1" on selection sel1 | ICoil = courant

Mesh
  mesh1 "Maillage 1"
    size: MeshSizeDefault "Taille" | hmax = 7.77; hmin = 0.0348; hcurve = 0.3; hgrad = 1.3
    ftri2: FreeTri "Triangle libre 2" on selection sel1
      size1: Size "Taille 1" on entire geometry | hmax = 2.32; hmin = 0.0087; hcurve = 0.25; hgrad = 1.2; hauto = 2
    ftri3: FreeTri "Triangle libre 3" on selection sel2
      size1: Size "Taille 1" on selection sel2 | hauto = 3
    map1: Map "Quadrangle structuré 1" on remaining entities | adjustedgdistr = on
      dis1: Distribution on boundaries 6
    bl1: BndLayer "Couches limites 1" on domains 1, 3
      blp: BndLayerProp "Propriétés de couche limite" on boundaries 8, 9 | blnlayers = 4; blstretch = 1.5

Studies
  std1 "Etude 1 - Stationnaire - valeurs DC de L, R et Hz"
    stat: Stationary "Stationnaire"

Solver configurations
  sol1 "Solution 1" (study std1)
    v1: Variables "Variables dépendantes 1"
    s1: Stationary "Solveur stationnaire 1"
      dDef: Direct
      fc1: FullyCoupled "Couplage fort 1" | linsolver = dDef

Datasets
  dset1: Solution | solution = sol1
  rev1: Revolve2D "Révolution 2D 1" | data = dset1; startangle = -90; revangle = 225

Derived values
  gev1: EvalGlobal "Evaluation globale 1"
    data = dset1
    table = tbl1
    expr = {mf.LCoil_1, mf.RCoil_1}
    unit = {nH, mΩ}
    descr = {Inductance de la bobine, Résistance de bobine (DC)}

Plots
  pg1: PlotGroup2D "Norme de la densité de flux magnétique (mf)" | data = dset1; dataisaxisym = on
    surf1: Surface | expr = mf.normB; unit = mT
    str1: Streamline "Ligne de courant 1" on boundaries 1, 3-7, 10-14 | expr = {mf.Br, mf.Bz}; udist = 0.03
      col1: Color "Expression de la couleur 1" | expr = mf.normB
      filt1: Filter "Filtre 1" | expr = !isScalingSystemDomain
    con1: Contour "Isovaleurs 1" (disabled) | expr = r*mf.Aphi; levelrounding = off
      filt1: Filter "Filtre 1" | expr = !isScalingSystemDomain
  pg2: PlotGroup3D "Norme de la densité de flux magnétique, géométrie de révolution (mf)" | data = rev1
    vol1: Volume | expr = mf.normB
    con1: Contour "Isovaleurs 1" | expr = r*mf.Aphi; levelrounding = off
      filt1: Filter "Filtre 1" | expr = !isScalingSystemDomain