// COMSOL Multiphysics 6.1.0.282 model "TP2_p2.mph"
// Outline of the model tree

Parameters
  rcoil = 50[mm]
  rcond = 1[mm]
  rair = 58[mm]
  courant = 1[A]
  Tamb = 25[degC]
  rinf = 5[mm]
  Freq = 100[Hz]
  sigma_CU = 59.6e6[S/m]
  mu_r = 1
  mu0 = 4e-7*pi[H/m]
  delta_CU = 1/sqrt(pi*Freq*mu0*mu_r*sigma_CU)

Selections
  sel1: Explicit "Coil" on domains 4
  sel2: Explicit "Air" on domains 2

Coordinate systems
  ie1: InfiniteElement "Domaine de type élément infini 1" on domains 1, 3

Geometry
  geom1 "Géométrie 1" (2D axisymmetric, length unit mm)
    c1: Circle "Conducteur" | pos = {rcoil, 0}; r = rcond
    c2: Circle "Air" | rot = -90; layername = Couche 1; layer = rinf; r = rair; angle = 180
    pt1: Point
    pt2: Point | p = {, 50[mm]}
    fin: Finalize "Constituer une union"

Materials
  mat1: Common "Air" on domains 1-3
    def "Basic"
      thermalexpansioncoefficient = alpha_p(pA,T)
      molarmass = 0.02897[kg/mol]
      bulkviscosity = muB(T)
      relpermeability = 1
      relpermittivity = 1
      dynamicviscosity = eta(T)
      ratioofspecificheat = 1.4
      electricconductivity = 0[S/m]
      heatcapacity = Cp(T)
      density = rho(pA,T)
      thermalconductivity = k(T)
      soundspeed = cs(T)
      eta: Piecewise | arg = T; pieces = {200.0, 1600.0, -8.38278E-7+8.35717342E-8*T^1-7.69429583E-11*T^2+4.6437266E-14*T^3-1.06585607E-17*T^4}; argunit = K; fununit = Pa*s
      Cp: Piecewise | arg = T; pieces = {200.0, 1600.0, 1047.63657-0.372589265*T^1+9.45304214E-4*T^2-6.02409443E-7*T^3+1.2858961E-10*T^4}; argunit = K; fununit = J/(kg*K)
      rho: Analytic | expr = pA*0.02897/R_const[K*mol/J]/T; args = {pA, T}; fununit = kg/m^3; argunit = {Pa, K}
      k: Piecewise | arg = T; pieces = {200.0, 1600.0, -0.00227583562+1.15480022E-4*T^1-7.90252856E-8*T^2+4.11702505E-11*T^3-7.43864331E-15*T^4}; argunit = K; fununit = W/(m*K)
      cs: Analytic | expr = sqrt(1.4*R_const[K*mol/J]/0.02897*T); args = T; fununit = m/s; argunit = K
      an1: Analytic | funcname = alpha_p; expr = -1/rho(pA,T)*d(rho(pA,T),T); args = {pA, T}; fununit = 1/K; argunit = {Pa, K}
      an2: Analytic "Analytic 2a" | funcname = muB; expr = 0.6*eta(T); args = T; fununit = Pa*s; argunit = K
    RefractiveIndex
      n = 1
      ki = 0
    NonlinearModel
      BA = (def.gamma+1)/2
    idealGas
      Rs = R_const/Mn
      heatcapacity = Cp(T)
      ratioofspecificheat = 1.4
      molarmass = 0.02897
      Cp: Piecewise | arg = T; pieces = {200.0, 1600.0, 1047.63657-0.372589265*T^1+9.45304214E-4*T^2-6.02409443E-7*T^3+1.2858961E-10*T^4}; argunit = K; fununit = J/(kg*K)
  mat2: Common "Copper" on domains 4
    def "Basic"
      relpermeability = 1
      electricconductivity = 59.6e6[S/m]
      thermalexpansioncoefficient = 17e-6[1/K]
      heatcapacity = 385[J/(kg*K)]
      relpermittivity = 1
      density = 8960[kg/m^3]
      thermalconductivity = 400[W/(m*K)]
    Enu "Young's modulus and Poisson's ratio"
      E = 110[GPa]
      nu = 0.35
    linzRes "Linearized resistivity"
      rho0 = 1.72e-8[ohm*m]
      alpha = 0.0039[1/K]
      Tref = 298[K]

Physics
  mf: InductionCurrents "Champs magnétiques" on all domains
    dependent variable A = {Ar, Aphi, Az}
    PortSweepSettings.useSweep = 0
    al1: AmperesLaw "Loi d'Ampère 1" (default)
    axi1: AxialSymmetry "Symétrie axiale 1" (default)
    mi1: MagneticInsulation "Isolation magnétique 1" (default)
    init1: init "Valeurs initiales 1" (default)
    coil1: Coil "Bobine 1" on selection sel1 | ICoil = courant

Mesh
  mesh1 "Maillage 1"
    size: MeshSizeDefault "Taille" | hmax = 7.77; hmin = 0.0348; hcurve = 0.3; hgrad = 1.3
    ftri2: FreeTri "Triangle libre 2 - Conducteur" on selection sel1
      size1: Size "Taille 1" on entire geometry
    bl2: BndLayer "Couches limites 2 - Conducteur" on selection sel1
      blp: BndLayerProp "Propriétés de couche limite" on boundaries 11-14
        blnlayers = 4
        blstretch = 1.3
        inittype = blhmin
        blhmin = delta_CU
        adjustdir = off
    ftri3: FreeTri "Triangle libre 3 - Air" on selection sel2
      size1: Size "Taille 1" on selection sel2 | hauto = 3
    map1: Map "Quadrangle structuré 1" on remaining entities | adjustedgdistr = on
      dis1: Distribution on boundaries 6
    bl1: BndLayer "Couches limites 1" on domains 1, 3
      blp: BndLayerProp "Propriétés de couche limite" on boundaries 8, 9 | blnlayers = 4; blstretch = 1.5

Studies
  std1 "Etude 1 - étude fréquentielle à 100 Hz"
    freq: Frequency "Domaine fréquentiel" | plist = Freq
  std2 "Etude 2 - étude fréquentielle paramétrique"
    param: Parametric "Analyse paramétrique" | pname = Freq; plistarr = 10[kHz], 100[kHz], 1[MHz]; punit = Hz
    freq: Frequency "Domaine fréquentiel" | plist = Freq

Solver configurations
  sol1 "Solution 1" (study std1)
    v1: Variables "Variables dépendantes 1"
    s1: Stationary "Solveur stationnaire 1" | linpmethod = sol
      dDef: Direct
      p1: Parametric "Paramétrique 1" | pname = freq; plistarr = Freq; punit = Hz; pcontinuationmode = no
      fc1: FullyCoupled "Couplage fort 1" | linsolver = dDef
  sol2 "Solution 2" (study std2)
    // same settings as sol1
  sol3 "Solutions paramétriques 1" (study std2)

Datasets
  dset1: Solution on domains 4 | solution = sol1
  rev1: Revolve2D "Révolution 2D 1" | data = dset1; startangle = -90; revangle = 225
  dset2: Solution | solution = sol2
  dset3: Solution on selection sel1 | solution = sol3
  rev2: Revolve2D "Révolution 2D 2" | data = dset3; startangle = -90; revangle = 225
  cln1: CutLine2D "Ligne de coupe 2D 1" | data = dset3; genpoints = {{rcoil, -rcond}, {rcoil, rcond}}

Plots
  pg2: PlotGroup2D "Densité de courant à 100 Hz" | data = dset1
    surf1: Surface | expr = mf.normJ; unit = A/mm^2
  pg3: PlotGroup2D "Densité de courant à 10, 100 et 1000 kHz" | data = dset3; dataisaxisym = on
    surf1: Surface | expr = mf.normJ; unit = A/mm^2
  pg4: PlotGroup1D "Groupe de graphiques 1D 4" | data = dset1
    lngr1: LineGraph "Graphique sur ligne 1" | data = cln1; expr = mf.normJ; unit = A/mm^2
  pg5: PlotGroup3D "Groupe de graphiques 3D 5" | data = rev1
    vol1: Volume | data = rev2; expr = mf.normB

Exports
  anim1: Animation | target = player; maxframes = 3; frametime = 0.5; synchronize = off