// COMSOL Multiphysics 6.1.0.282 model "TP2_p3.mph"
// Outline of the model tree

Parameters
  Rcoil_int = 5[mm]
  Rcond = 1[mm]
  Rair = Rint+Rinf
  Rint = 60[mm]
  Rinf = 3[mm]
  Freq = 20[kHz]
  delta = sqrt(1/(pi*Freq*mu_0*sigma_CU))
  sigma_CU = 6*10^7[S/m]
  mu_0 = 4*pi*10^-7[H/m]
  Pot_r = 50[mm]
  Pot_z = 5[mm]
  Pot_offset = 2[mm]
  Courant = 10[A]
  Tamb = 25[degC]
  sigma_Iron = 1/rho_Iron
  alpha_Iron = 0.0039[1/K]
  rho_Iron = 9.71e-8[ohm*m]
  delta_iron = sqrt(1/(pi*Freq*mu_0*mu_r*sigma_Iron))
  mu_r = 200

Selections
  sel1: Explicit "Coil" on domains 5-17
  sel2: Explicit "Air" on domains 2

Coordinate systems
  ie1: InfiniteElement "Domaine de type élément infini 1" on domains 1, 4

Geometry
  geom1 "Géométrie 1" (2D axisymmetric, length unit mm)
    c1: Circle "Conducteur" | pos = {Rcoil_int, 0}; r = Rcond
    arr1: Array "Réseau 1" | input = c1; size = 13; type = linear; linearsize = 13; displ = {3.5, 0}
    c2: Circle "Air" | rot = -90; layername = Couche 1; layer = Rinf; r = Rair; angle = 180
    r1: Rectangle | pos = {0, Pot_offset}; size = {Pot_r, Pot_z}
    fin: Finalize "Constituer une union"

Materials
  mat1: Common "Air" on domains 1, 2, 4
    def "Basic"
      thermalexpansioncoefficient = alpha_p(pA,T)
      molarmass = 0.02897[kg/mol]
      bulkviscosity = muB(T)
      relpermeability = 1
      relpermittivity = 1
      dynamicviscosity = eta(T)
      ratioofspecificheat = 1.4
      electricconductivity = 0[S/m]
      heatcapacity = Cp(T)
      density = rho(pA,T)
      thermalconductivity = k(T)
      soundspeed = cs(T)
      eta: Piecewise | arg = T; pieces = {200.0, 1600.0, -8.38278E-7+8.35717342E-8*T^1-7.69429583E-11*T^2+4.6437266E-14*T^3-1.06585607E-17*T^4}; argunit = K; fununit = Pa*s
      Cp: Piecewise | arg = T; pieces = {200.0, 1600.0, 1047.63657-0.372589265*T^1+9.45304214E-4*T^2-6.02409443E-7*T^3+1.2858961E-10*T^4}; argunit = K; fununit = J/(kg*K)
      rho: Analytic | expr = pA*0.02897/R_const[K*mol/J]/T; args = {pA, T}; fununit = kg/m^3; argunit = {Pa, K}
      k: Piecewise | arg = T; pieces = {200.0, 1600.0, -0.00227583562+1.15480022E-4*T^1-7.90252856E-8*T^2+4.11702505E-11*T^3-7.43864331E-15*T^4}; argunit = K; fununit = W/(m*K)
      cs: Analytic | expr = sqrt(1.4*R_const[K*mol/J]/0.02897*T); args = T; fununit = m/s; argunit = K
      an1: Analytic | funcname = alpha_p; expr = -1/rho(pA,T)*d(rho(pA,T),T); args = {pA, T}; fununit = 1/K; argunit = {Pa, K}
      an2: Analytic "Analytic 2a" | funcname = muB; expr = 0.6*eta(T); args = T; fununit = Pa*s; argunit = K
    RefractiveIndex
      n = 1
      ki = 0
    NonlinearModel
      BA = (def.gamma+1)/2
    idealGas
      Rs = R_const/Mn
      heatcapacity = Cp(T)
      ratioofspecificheat = 1.4
      molarmass = 0.02897
      Cp: Piecewise | arg = T; pieces = {200.0, 1600.0, 1047.63657-0.372589265*T^1+9.45304214E-4*T^2-6.02409443E-7*T^3+1.2858961E-10*T^4}; argunit = K; fununit = J/(kg*K)
  mat2: Common "Copper" on selection sel1
    def "Basic"
      relpermeability = 1
      electricconductivity = 59.6e6[S/m]
      thermalexpansioncoefficient = 17e-6[1/K]
      heatcapacity = 385[J/(kg*K)]
      relpermittivity = 1
      density = 8960[kg/m^3]
      thermalconductivity = 400[W/(m*K)]
    Enu "Young's modulus and Poisson's ratio"
      E = 110[GPa]
      nu = 0.35
    linzRes "Linearized resistivity"
      rho0 = 1.72e-8[ohm*m]
      alpha = 0.0039[1/K]
      Tref = 298[K]
  mat3: Common "Soft Iron (Without Losses)" on domains 3
    def "Basic"
      electricconductivity = 0[S/m]
      relpermittivity = 1
      relpermeability = mu_r
    BHCurve
      normB = BH(normHin)
      normH = BH_inv(normBin)
      Wpm = BH_prim(normHin)
      normHin = sqrt(H1^2+H2^2+H3^2+eps)
      DESCR_PREFIX:normHin = Norme du champ magnétique
      normBin = sqrt(B1^2+B2^2+B3^2+eps)
      DESCR_PREFIX:normBin = Norme de la densité de flux magnétique
      BH: Interpolation
        table = 
          {0, 0}
          {663.146, 1}
          {1067.5, 1.1}
          {1705.23, 1.2}
          {2463.11, 1.3}
          {3841.67, 1.4}
          {5425.74, 1.5}
          {7957.75, 1.6}
          {12298.3, 1.7}
          {20462.8, 1.8}
          {32169.6, 1.9}
          {61213.4, 2}
          {111408, 2.1}
          {188487.757, 2.2}
          {267930.364, 2.3}
          {347507.836, 2.4}
        extrap = linear
        fununit = T
        argunit = A/m
        defineinv = on
        defineprimfun = on
    EffectiveBHCurve
      normBeff = BHeff(normHeffin)
      normHeff = BHeff_inv(normBeffin)
      normHeffin = sqrt(realdot(H1,H1)+realdot(H2,H2)+realdot(H3,H3)+eps)
      DESCR_PREFIX:normHeffin = Norme du champ magnétique effectif
      normBeffin = sqrt(realdot(B1,B1)+realdot(B2,B2)+realdot(B3,B3)+eps)
      DESCR_PREFIX:normBeffin = Norme de la densité de flux magnétique effectif
      BHeff: Interpolation
        table = 
          {0, 0}
          {663.146, 1.00000005169}
          {1067.5, 1.49364951241}
          {1705.23, 1.94153284613}
          {2463.11, 2.25776566937}
          {3841.67, 2.60998064243}
          {5425.74, 2.86644520908}
          {7957.75, 3.14414380972}
          {12298.3, 3.44853805165}
          {20462.8, 3.78167119737}
          {32169.6, 4.05834559011}
          {61213.4, 4.42064655295}
          {111408, 4.72127408955}
          {188487.757, 4.97214814072}
          {267930.364, 5.14551086086}
          {347507.836, 5.24551086143}
        extrap = linear
        fununit = T
        argunit = A/m
        defineinv = on
    linzRes "Résistivité linéarisée"
      rho0 = rho_Iron
      alpha = alpha_Iron
      Tref = Tamb

Physics
  mf: InductionCurrents "Champs magnétiques" on all domains
    dependent variable A = {Ar, Aphi, Az}
    PortSweepSettings.useSweep = 0
    al1: AmperesLaw "Loi d'Ampère 1" (default)
    axi1: AxialSymmetry "Symétrie axiale 1" (default)
    mi1: MagneticInsulation "Isolation magnétique 1" (default)
    init1: init "Valeurs initiales 1" (default)
    coil1: Coil "Bobine 1" on selection sel1 | coilGroup = 1; ICoil = Courant
    al2: AmperesLaw "Loi d'Ampère 2" on domains 3 | ConstitutiveRelationJcE = LinearizedResistivity

Mesh
  mesh1 "Maillage 1"
    size: MeshSizeDefault "Taille" | hmax = 8.44; hmin = 0.0378; hcurve = 0.3; hgrad = 1.3
    ftri2: FreeTri "Triangle libre 2 - Conducteur" on selection sel1
      size1: Size "Taille 1" on entire geometry
    ftri3: FreeTri "Triangle libre 3 - Air" on selection sel2
      size1: Size "Taille 1" on selection sel2 | hauto = 3
    ftri4: FreeTri "Triangle libre 4" on domains 3
    map1: Map "Quadrangle structuré 1" on remaining entities | adjustedgdistr = on
      dis1: Distribution on no boundaries
    bl1: BndLayer "Couches limites 1" on no domains
      blp: BndLayerProp "Propriétés de couche limite" on no boundaries | blnlayers = 4; blstretch = 1.5

Studies
  std1 "Etude 1 - étude fréquentielle à 100 Hz"
    freq: Frequency "Domaine fréquentiel" | plist = Freq
  std2 "Etude 2 - étude fréquentielle paramétrique"
    param: Parametric "Analyse paramétrique"
    freq: Frequency "Domaine fréquentiel" | plist = Freq

Solver configurations
  sol1 "Solution 1" (study std1)
    v1: Variables "Variables dépendantes 1"
    s1: Stationary "Solveur stationnaire 1" | linpmethod = sol
      dDef: Direct
      p1: Parametric "Paramétrique 1" | pname = freq; plistarr = Freq; punit = Hz; pcontinuationmode = no
      fc1: FullyCoupled "Couplage fort 1" | linsolver = dDef
  sol2 "Solution 2" (study std2)
    // same settings as sol1
  sol3 "Solutions paramétriques 1" (study std2)

Datasets
  dset1: Solution | solution = sol1
  rev1: Revolve2D "Révolution 2D 1" | data = dset1; startangle = -90; revangle = 225
  dset2: Solution | solution = sol2
  dset3: Solution on selection sel1 | solution = sol3
  rev2: Revolve2D "Révolution 2D 2" | data = dset3; startangle = -90; revangle = 225
  cln1: CutLine2D "Ligne de coupe 2D 1" | data = dset3; genpoints = {{rcoil, -rcond}, {rcoil, rcond}}
  rev3: Revolve2D "Révolution 2D 3" | data = dset1; startangle = -90; revangle = 225

Plots
  pg1: PlotGroup2D "Norme de la densité de flux magnétique (mf)" | data = dset1; dataisaxisym = on
    surf1: Surface | expr = mf.normB
    str1: Streamline "Ligne de courant 1" on boundaries 1-66 | expr = {mf.Br, mf.Bz}; udist = 0.03
      col1: Color "Expression de la couleur 1" | expr = mf.normB
      filt1: Filter "Filtre 1" | expr = !isScalingSystemDomain
    con1: Contour "Isovaleurs 1" | expr = r*mf.Aphi; levelrounding = off
      filt1: Filter "Filtre 1" | expr = !isScalingSystemDomain
  pg2: PlotGroup3D "Norme de la densité de flux magnétique, géométrie de révolution (mf)" | data = rev3
    vol1: Volume | expr = mf.normB
    con1: Contour "Isovaleurs 1" | expr = r*mf.Aphi; levelrounding = off
      filt1: Filter "Filtre 1" | expr = !isScalingSystemDomain
  pg3: PlotGroup2D "Groupe de graphiques 2D 3" | data = dset1
    surf1: Surface | data = dset1; expr = mf.coil1.T; descr = Température